variable Reset_Time equal 40000000
variable T_system equal 300
variable Timestep equal 0.004
variable Run equal 50
# ======begin (common information) ====
units		metal
atom_style	atomic
boundary   p p p
# === generate crd =====
read_data	crd.lmp
#=== masses, groups ===
mass 1 63.546000
group Cu type 1
mass 2 39.948000
group Ar type 2

#= interaction ===
neighbor	5.0 bin
neigh_modify	every 1 delay 0 check yes

pair_style hybrid lj/cut 10.  eam
pair_coeff 1 1 eam /home/vorontsov/work/Cu_u3.eam
pair_coeff 1 2 lj/cut 0.0123 3.76
pair_coeff 2 2 lj/cut 0.0123 3.76

timestep	${Timestep}
reset_timestep	${Reset_Time}
thermo	100

#=== clusters control ===
#compute 	cff all ngbr/atom 3.5 3
#compute  clu all cluster/en/atom 7.0

compute  ke all ke/atom
compute  pe all pe/atom
variable b atom c_ke+c_pe
compute  clu all cluster/ave/atom 7.0 c_ke
compute  cluu all cluster/ave/atom 7.0

compute  clus all cluster/atom 7.0

#fix 133 all clusters_del 20 clu 60
#fix 131 all monomer 25 clu 5000 1234 r_min 5.

#dump   clust_dump all custom 50 dump_clust.* id type c_clus c_cluu[1] c_cluu[2]
# c_cluu[3] c_cluu[4]
#dump_modify   clust_dump thresh c_cff[1] > 0

#=== temperature control ===
fix	t_Ar Ar temp/rescale 20 ${T_system} ${T_system} 20 0.5
fix		nve_fix all nve
#run		200

#=== final information ===
#dump   last_dmp all custom 1000 dump_last.lmp id type x y z vx vy vz c_clu
#run 0
